// COMSOL Multiphysics 6.4.0.293 model "ITO_ENZ_paper _replicating_disk_forward_manual_finer_mesh_correct_Si_nk_values.mph"
// Outline of the model tree
// Components: comp1 "Nonlinear Component", comp2 "Linear Component", comp3 "Linear Component ITO coated substrate"

Parameters
  h_ito = 0.310[um]  // Thickness of ITO
  h_si = 0.357[um]  // Height of Si disk
  h_glass = 2[um]  // Height of glass
  a = 0.636[um]  // Lattice constant of unit cell
  radius = 0.229[um]  // Radius of Si ellipse
  lmin = 1.15[um]  // Minimum wavelength
  lmax = 1.4[um]  // Maximum wavelength
  lstep = 1[nm]  // lambda step in sweep
  lam = lmax  // Wavelength
  PML = 1*lmax  // PML layer thickness
  Air = 1*lmax  // Air layer thickness
  Theta = 0[deg]  // Incidence angle
  Phi = 0[deg]  // Polarization (azimuthal) angle

Coordinate systems
  pml1: PML "Perfectly Matched Layer bottom" [geom1] on domains 1 | PMLfactor = 1/cos(Theta)
  pml2: PML "Perfectly Matched Layer top" [geom1] on domains 5 | PMLfactor = 1/cos(Theta)

Geometry
  geom1 "Geometry 1" [comp1] (3D, length unit m)
    blk1: Block
      size = {a, a, PML+h_ito+h_glass+Air+PML}
      layername = {PML bottom, glass, ITO, Si+Air}
      layer = {PML, h_glass, h_ito, Air}
      layernameold = {PML bottom, glass, ITO, Si+Air}
    wp1: WorkPlane | quickz = PML+h_ito+h_glass; unite = on
      c1: Circle | r = radius; pos = {a/2, a/2}
    ext1: Extrude | workplane = wp1; input = wp1; distance = h_si
    fin: Finalize "Form Union"
  geom6 "Geometry 1" [comp2] (3D, length unit m)
    blk1: Block
      size = {a, a, PML+h_ito+h_glass+Air+PML}
      layername = {PML bottom, glass, ITO, Si+Air}
      layer = {PML, h_glass, h_ito, Air}
      layernameold = {PML bottom, glass, ITO, Si+Air}
    wp1: WorkPlane | quickz = PML+h_ito+h_glass; unite = on
      c1: Circle | r = radius; pos = {a/2, a/2}
    ext1: Extrude | workplane = wp1; input = wp1; distance = h_si
    fin: Finalize "Form Union"
  geom7 "Geometry 1" [comp3] (3D, length unit m)
    blk1: Block
      size = {a, a, PML+h_ito+h_glass+Air+PML}
      layername = {PML bottom, glass, ITO, Si+Air}
      layer = {PML, h_glass, h_ito, Air}
      layernameold = {PML bottom, glass, ITO, Si+Air}
    fin: Finalize "Form Union"

Materials
  SiO2: Common "glass substrate" [comp1] on domains 1, 2
    RefractiveIndex: RefractiveIndex
      n = n(lam)
      ki = 0
      int1: Interpolation "Silica n"
        funcnametable = {int1, 1}
        funcname = n
        table = 
          {0.213856, 1.534307}
          {0.214438, 1.533722}
          {0.226747, 1.52275}
          {0.230209, 1.520081}
          {0.237833, 1.514729}
          {0.239938, 1.513367}
          {0.248272, 1.508398}
          {0.265204, 1.500029}
          {0.269885, 1.498047}
          {0.275278, 1.495913}
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        fununit = 1
        argunit = µm
        plotfuncname = n
  Si: Common [comp1] on domains 6
    RefractiveIndex: RefractiveIndex
      n = siliconrefractiveindex(lam)
      ki = Siliconk(lam)
      int1: Interpolation "Silicon n"
        funcnametable = {int1, 1}
        funcname = siliconrefractiveindex
        table = 
          {1.03E-01, 3.27E-01}
          {1.08E-01, 3.63E-01}
          {1.13E-01, 3.92E-01}
          {1.18E-01, 4.23E-01}
          {1.24E-01, 4.59E-01}
          {1.31E-01, 4.97E-01}
          {1.38E-01, 5.43E-01}
          {1.46E-01, 5.97E-01}
          {1.55E-01, 6.60E-01}
          {1.65E-01, 7.35E-01}
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        fununit = 1
        argunit = µm
        plotfuncname = siliconrefractiveindex
      int2: Interpolation "Silicon k"
        funcnametable = {int2, 1}
        funcname = Siliconk
        table = 
          {1.03E-01, 7.26E-01}
          {1.08E-01, 8.47E-01}
          {1.13E-01, 9.46E-01}
          {1.18E-01, 1.04E+00}
          {1.24E-01, 1.14E+00}
          {1.31E-01, 1.24E+00}
          {1.38E-01, 1.35E+00}
          {1.46E-01, 1.47E+00}
          {1.55E-01, 1.60E+00}
          {1.65E-01, 1.74E+00}
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        fununit = 1
        argunit = µm
        plotfuncname = Siliconk
  Air: Common [comp1] on domains 4, 5
    def: def "Basic"
      thermalexpansioncoefficient = alpha_p(pA,T)
      molarmass = 0.02897[kg/mol]
      bulkviscosity = muB(T)
      relpermeability = 1
      relpermittivity = 1
      dynamicviscosity = eta(T)
      ratioofspecificheat = 1.4
      electricconductivity = 0[S/m]
      heatcapacity = Cp(T)
      density = rho(pA,T)
      thermalconductivity = k(T)
      soundspeed = cs(T)
      eta: Piecewise | arg = T; pieces = {200.0, 1600.0, -8.38278E-7+8.35717342E-8*T^1-7.69429583E-11*T^2+4.6437266E-14*T^3-1.06585607E-17*T^4}; argunit = K; fununit = Pa*s
      Cp: Piecewise | arg = T; pieces = {200.0, 1600.0, 1047.63657-0.372589265*T^1+9.45304214E-4*T^2-6.02409443E-7*T^3+1.2858961E-10*T^4}; argunit = K; fununit = J/(kg*K)
      rho: Analytic | expr = pA*0.02897/R_const[K*mol/J]/T; args = {pA, T}; fununit = kg/m^3; argunit = {Pa, K}
      k: Piecewise | arg = T; pieces = {200.0, 1600.0, -0.00227583562+1.15480022E-4*T^1-7.90252856E-8*T^2+4.11702505E-11*T^3-7.43864331E-15*T^4}; argunit = K; fununit = W/(m*K)
      cs: Analytic | expr = sqrt(1.4*R_const[K*mol/J]/0.02897*T); args = T; fununit = m/s; argunit = K
      an1: Analytic | funcname = alpha_p; expr = -1/rho(pA,T)*d(rho(pA,T),T); args = {pA, T}; fununit = 1/K; argunit = {Pa, K}
      an2: Analytic "Analytic 2a" | funcname = muB; expr = 0.6*eta(T); args = T; fununit = Pa*s; argunit = K
    RefractiveIndex: RefractiveIndex
      n = 1
      ki = 0
    NonlinearModel: NonlinearModel
      BA = def.gamma-1
    idealGas: idealGas
      Rs = R_const/Mn
      heatcapacity = Cp(T)
      ratioofspecificheat = 1.4
      molarmass = 0.02897[kg/mol]
      Cp: Piecewise | arg = T; pieces = {200.0, 1600.0, 1047.63657-0.372589265*T^1+9.45304214E-4*T^2-6.02409443E-7*T^3+1.2858961E-10*T^4}; argunit = K; fununit = J/(kg*K)
  ITOnonlinear: Common [comp1] on domains 3
    RefractiveIndex: RefractiveIndex
      n = ITOnonlinearn(lam)
      ki = ITOnonlineark(lam)
      int5: Interpolation "ITO nonlinear n"
        funcnametable = {int5, 1}
        funcname = ITOnonlinearn
        table = 
          {0.3712659, 1.87738}
          {0.37285544, 1.87656}
          {0.37444501, 1.87574}
          {0.37603461, 1.87492}
          {0.37762421, 1.8741}
          {0.37921381, 1.87327}
          {0.38080341, 1.87243}
          {0.38239307, 1.8716}
          {0.38398273, 1.87075}
          {0.38557239, 1.86991}
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        fununit = 1
        argunit = µm
        plotfuncname = ITOnonlinearn
      int6: Interpolation "ITO nonlinear k"
        funcnametable = {int5, 1}
        funcname = ITOnonlineark
        table = 
          {0.3712659, 0.00239}
          {0.37285544, 0.00242}
          {0.37444501, 0.00246}
          {0.37603461, 0.00249}
          {0.37762421, 0.00252}
          {0.37921381, 0.00256}
          {0.38080341, 0.00259}
          {0.38239307, 0.00262}
          {0.38398273, 0.00266}
          {0.38557239, 0.00269}
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        fununit = 1
        argunit = µm
        plotfuncname = ITOnonlineark
  SiO7: Common "glass substrate" [comp2] on domains 1, 2
    // same settings as SiO2
  ITOlinear5: Common "ITO linear" [comp2] on domains 3
    RefractiveIndex: RefractiveIndex
      n = ITOlinearn(lam)
      ki = ITOlineark(lam)
      int3: Interpolation "ITO linear n"
        funcnametable = {int3, 1}
        funcname = ITOlinearn
        table = 
          {0.3712659, 1.877376}
          {0.372855438, 1.876562}
          {0.374445007, 1.875744}
          {0.376034607, 1.874922}
          {0.377624207, 1.874096}
          {0.379213806, 1.873266}
          {0.380803406, 1.872432}
          {0.382393066, 1.871595}
          {0.383982727, 1.870754}
          {0.385572388, 1.869908}
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        fununit = 1
        argunit = µm
        plotfuncname = ITOlinearn
      int4: Interpolation "ITO linear k"
        funcnametable = {int4, 1}
        funcname = ITOlineark
        table = 
          {0.3712659, 0.002392}
          {0.372855438, 0.002424}
          {0.374445007, 0.002456}
          {0.376034607, 0.002489}
          {0.377624207, 0.002522}
          {0.379213806, 0.002555}
          {0.380803406, 0.002588}
          {0.382393066, 0.002622}
          {0.383982727, 0.002656}
          {0.385572388, 0.00269}
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        fununit = 1
        argunit = µm
        plotfuncname = ITOlineark
  Si5: Common "Si" [comp2] on domains 6
    // same settings as Si
  Air5: Common "Air" [comp2] on domains 4, 5
    // same settings as Air
  SiO8: Common "glass substrate" [comp3] on domains 1, 2
    // same settings as SiO2
  ITOlinear6: Common "ITO linear" [comp3] on domains 3
    // same settings as ITOlinear5
  Air6: Common "Air" [comp3] on domains 4, 5
    // same settings as Air

Physics
  ewfd: ElectromagneticWavesFrequencyDomain [geom1] on all domains
    dependent variable E = {Ex, Ey, Ez}
    wee1: WaveEquationElectric (default) | n_mat = from_mat
    pec1: PerfectElectricConductor (default)
    init1: init "Initial Values 1" (default)
    pc1: PeriodicCondition on boundaries 1, 4, 7, 10, 13, 28-32
      PeriodicType = Floquet
      Floquet_source = FromPeriodicPort
      destinationDomains: boundaries 28-32
    pc2: PeriodicCondition on boundaries 2, 5, 8, 11, 14, 17-21
      PeriodicType = Floquet
      Floquet_source = FromPeriodicPort
      destinationDomains: boundaries 17-21
    port1: Port on boundaries 15
      PortExcitation = off
      PortSlit = 1
      Eampl = {0, 1, 0}
      alpha1_inc = Theta
      alpha2_inc = Phi
      PortType = Periodic
      E0 = {0, 1, 0}
    port2: Port on boundaries 6
      PortExcitation = on
      PortSlit = 1
      SlitType = DomainBacked
      PortOrientation = ReversePort
      Eampl = {0, 1, 0}
      PortType = Periodic
      E0 = {0, 1, 0}
    sctr1: Scattering "Scattering Boundary Condition 1" on boundaries 3
    sctr2: Scattering "Scattering Boundary Condition 2" on boundaries 16
  ewfd2: ElectromagneticWavesFrequencyDomain [geom6] on all domains
    dependent variable E = {Ex, Ey, Ez}
    wee1: WaveEquationElectric (default)
      DisplacementFieldModel = RefractiveIndex
      multiphysics = The Semiconductor Electromagnetic Waves multiphysics coupling adds additional contributions to the optical properties
      omega1 = 10^5
      omega2 = 10^12
      deltaEpsilon = 1
      epsilonInf = 1
      ConstitutiveRelationH = RelativePermeability
    pec1: PerfectElectricConductor (default)
      constraintOptions = pointwiseConstraints
      constraintType = symmetricConstraint
      constraintMethod = elemental
    init1: init "Initial Values 1" (default)
    pc1: PeriodicCondition on boundaries 1, 4, 7, 10, 13, 28-32
      PeriodicType = Floquet
      Floquet_source = FromPeriodicPort
      RotationType = automatic
      constraintOptions = pointwiseConstraints
      constraintType = symmetricConstraint
      constraintMethod = nodal
      TransformationMethod = automatic
      meshSimilarity = fail
      meshSimilarityTol = 1e-3
      destinationDomains: boundaries 28-32
    pc2: PeriodicCondition on boundaries 2, 5, 8, 11, 14, 17-21
      PeriodicType = Floquet
      Floquet_source = FromPeriodicPort
      RotationType = automatic
      constraintOptions = pointwiseConstraints
      constraintType = symmetricConstraint
      constraintMethod = nodal
      TransformationMethod = automatic
      meshSimilarity = fail
      meshSimilarityTol = 1e-3
      destinationDomains: boundaries 17-21
    port1: Port on boundaries 15
      PortName = 1
      Pin = 1[W]
      PortSlit = 1
      SlitType = DomainBacked
      PortOrientation = ForwardPort
      Polarization = UserDefined
      LinearPol = S
      CircularPol = lhcp
      InputType = E
      Eampl = {0, 1, 0}
      Hampl = {t1x, t1y, t1z}
      alpha1_inc = Theta
      alpha2_inc = Phi
      PortType = Periodic
      PortModeNumber = 10
      CircularPortModeNumber = 11
      beta = ewfd.k
      E0 = {0, 1, 0}
      H0 = {t1x, t1y, t1z}
      PortFreq = 1[GHz]
      PortModeType = TE
      epsilonr = 1
      PortCoaxialModeType = TEM
      n_mat = FromAdjacentDomain
      DiffractionOrderSpecification = FromCurrentParameters
      IncludeInAutomaticDiffractionOrderCalculation = 1
      MaximumFrequency = FromStudy
      constraintType = symmetricConstraint
      constraintMethod = nodal
    port2: Port on boundaries 6
      PortName = 2
      PortExcitation = on
      Pin = 1[W]
      PortSlit = 1
      SlitType = DomainBacked
      PortOrientation = ReversePort
      Polarization = UserDefined
      LinearPol = S
      CircularPol = rhcp
      InputType = E
      Eampl = {0, 1, 0}
      Hampl = {t1x, t1y, t1z}
      PortType = Periodic
      PortModeNumber = 10
      CircularPortModeNumber = 11
      beta = ewfd.k
      E0 = {0, 1, 0}
      H0 = {t1x, t1y, t1z}
      PortFreq = 1[GHz]
      PortModeType = TE
      epsilonr = 1
      PortCoaxialModeType = TEM
      n_mat = FromAdjacentDomain
      DiffractionOrderSpecification = FromCurrentParameters
      IncludeInAutomaticDiffractionOrderCalculation = 1
      MaximumFrequency = FromStudy
      constraintType = symmetricConstraint
      constraintMethod = nodal
    sctr1: Scattering "Scattering Boundary Condition 1" on boundaries 3
      IncidentField = NoIncidentField
      WaveType = PlaneWave
      kdir = {-ewfd2.nx, -ewfd2.ny, -ewfd2.nz}
      Order = FirstOrder
      w0 = ((10*2)*pi)/ewfd2.k0
      inputQuantity = ElectricFieldAmplitude
      inputPower = 1[W]
    sctr2: Scattering "Scattering Boundary Condition 2" on boundaries 16
      IncidentField = NoIncidentField
      WaveType = PlaneWave
      kdir = {-ewfd2.nx, -ewfd2.ny, -ewfd2.nz}
      Order = FirstOrder
      w0 = ((10*2)*pi)/ewfd2.k0
      inputQuantity = ElectricFieldAmplitude
      inputPower = 1[W]
  ewfd3: ElectromagneticWavesFrequencyDomain [geom7] on all domains
    dependent variable E = {Ex, Ey, Ez}
    wee1: WaveEquationElectric (default)
      DisplacementFieldModel = RefractiveIndex
      multiphysics = The Semiconductor Electromagnetic Waves multiphysics coupling adds additional contributions to the optical properties
      omega1 = 10^5
      omega2 = 10^12
      deltaEpsilon = 1
      epsilonInf = 1
      ConstitutiveRelationH = RelativePermeability
    pec1: PerfectElectricConductor (default)
      constraintOptions = pointwiseConstraints
      constraintType = symmetricConstraint
      constraintMethod = elemental
    init1: init "Initial Values 1" (default)
    pc1: PeriodicCondition on boundaries 1, 4, 7, 10, 13, 22-26
      PeriodicType = Floquet
      Floquet_source = FromPeriodicPort
      RotationType = automatic
      constraintOptions = pointwiseConstraints
      constraintType = symmetricConstraint
      constraintMethod = nodal
      TransformationMethod = automatic
      meshSimilarity = fail
      meshSimilarityTol = 1e-3
      destinationDomains: boundaries 22-26
    pc2: PeriodicCondition on boundaries 2, 5, 8, 11, 14, 17-21
      PeriodicType = Floquet
      Floquet_source = FromPeriodicPort
      RotationType = automatic
      constraintOptions = pointwiseConstraints
      constraintType = symmetricConstraint
      constraintMethod = nodal
      TransformationMethod = automatic
      meshSimilarity = fail
      meshSimilarityTol = 1e-3
      destinationDomains: boundaries 17-21
    port1: Port on boundaries 15
      PortName = 1
      Pin = 1[W]
      PortSlit = 1
      SlitType = DomainBacked
      PortOrientation = ForwardPort
      Polarization = UserDefined
      LinearPol = S
      CircularPol = lhcp
      InputType = E
      Eampl = {0, 1, 0}
      Hampl = {t1x, t1y, t1z}
      alpha1_inc = Theta
      alpha2_inc = Phi
      PortType = Periodic
      PortModeNumber = 10
      CircularPortModeNumber = 11
      beta = ewfd.k
      E0 = {0, 1, 0}
      H0 = {t1x, t1y, t1z}
      PortFreq = 1[GHz]
      PortModeType = TE
      epsilonr = 1
      PortCoaxialModeType = TEM
      n_mat = FromAdjacentDomain
      DiffractionOrderSpecification = FromCurrentParameters
      IncludeInAutomaticDiffractionOrderCalculation = 1
      MaximumFrequency = FromStudy
      constraintType = symmetricConstraint
      constraintMethod = nodal
    port2: Port on boundaries 6
      PortName = 2
      PortExcitation = on
      Pin = 1[W]
      PortSlit = 1
      SlitType = DomainBacked
      PortOrientation = ReversePort
      Polarization = UserDefined
      LinearPol = S
      CircularPol = rhcp
      InputType = E
      Eampl = {0, 1, 0}
      Hampl = {t1x, t1y, t1z}
      PortType = Periodic
      PortModeNumber = 10
      CircularPortModeNumber = 11
      beta = ewfd.k
      E0 = {0, 1, 0}
      H0 = {t1x, t1y, t1z}
      PortFreq = 1[GHz]
      PortModeType = TE
      epsilonr = 1
      PortCoaxialModeType = TEM
      n_mat = FromAdjacentDomain
      DiffractionOrderSpecification = FromCurrentParameters
      IncludeInAutomaticDiffractionOrderCalculation = 1
      MaximumFrequency = FromStudy
      constraintType = symmetricConstraint
      constraintMethod = nodal
    sctr1: Scattering "Scattering Boundary Condition 1" on boundaries 3
      IncidentField = NoIncidentField
      WaveType = PlaneWave
      kdir = {-ewfd3.nx, -ewfd3.ny, -ewfd3.nz}
      Order = FirstOrder
      w0 = ((10*2)*pi)/ewfd3.k0
      inputQuantity = ElectricFieldAmplitude
      inputPower = 1[W]
    sctr2: Scattering "Scattering Boundary Condition 2" on boundaries 16
      IncidentField = NoIncidentField
      WaveType = PlaneWave
      kdir = {-ewfd3.nx, -ewfd3.ny, -ewfd3.nz}
      Order = FirstOrder
      w0 = ((10*2)*pi)/ewfd3.k0
      inputQuantity = ElectricFieldAmplitude
      inputPower = 1[W]

Mesh
  mesh1 "Mesh 1" [geom1] (physics-controlled)
  mesh5 "Manual mesh" [geom1]
    size: MeshSizeDefault | hmax = lmin*0.2; hmin = 5E-9; hcurve = 0.2; hgrad = 1.3; hnarrow = 1
    size1: Size on domains 3 | hmax = lmin*0.2; hmin = 20E-9; hcurve = 0.2; hgrad = 1.3; hnarrow = 1
    size2: Size on domains 1, 2 | hmax = lmin*0.2; hmin = 20E-9; hcurve = 0.2; hgrad = 1.3; hnarrow = 1
    size3: Size on domains 6 | hmax = lmin*0.2; hmin = 20E-9; hcurve = 0.2; hgrad = 1.3; custom = on; hnarrow = 1
    size4: Size on boundaries 10, 11, 13-16, 20, 21, 31, 32
      hmax = lmin*0.2
      hmin = 1E-9
      hcurve = 0.2
      hgrad = 1.3
      hnarrow = 1
    size5: Size on boundaries 12 | hmax = lmin*0.2; hmin = 4E-9; hcurve = 0.2; hnarrow = 5; hgrad = 1.3
    size6: Size on boundaries 24, 25 | hmax = lmin*0.2; hmin = 5E-9; hcurve = 0.2; hnarrow = 5; hgrad = 1.3
    id1: IdenticalMesh | group1 = boundaries 1, 4, 7, 10, 13; group2 = boundaries 28-32
    id2: IdenticalMesh | group1 = boundaries 2, 5, 8, 11, 14; group2 = boundaries 17-21
    dis1: Distribution on edges 1, 13, 18, 26, 41, 49, 52, 56 | type = predefined; elemcount = 8
    ftet1: FreeTet "Free Tetrahedral 1" on domains 2-4, 6 | optcurved = on
    map1: Map "Mapped 1" on boundaries 1, 13 | adjustedgdistr = on
    copy1: Copy | mesh = mesh5; source = boundaries 1, 13; destination = boundaries 28, 32
    map2: Map "Mapped 2" on boundaries 2, 14 | adjustedgdistr = on
    copy2: Copy | mesh = mesh5; source = boundaries 2, 14; destination = boundaries 17, 21
    swe1: Sweep "Swept 1" on domains 1, 5
      dis1: Distribution on domains 1, 5 | numelem = 8
  mesh8 "Mesh 1" [geom6] (physics-controlled)
  mesh9 "Manual mesh" [geom6]
    size: MeshSizeDefault | hmax = lmin*0.2; hmin = 5E-9; hcurve = 0.2; hgrad = 1.3; custom = on
    size1: Size on domains 3 | hmax = lmin*0.2; hmin = 20E-9; hcurve = 0.2; hgrad = 1.3; custom = on
    size2: Size on domains 1, 2 | hmax = lmin*0.2; hmin = 20E-9; hcurve = 0.2; hgrad = 1.3; custom = on
    size3: Size on domains 6 | hmax = lmin*0.2; hmin = 20E-9; hcurve = 0.2; hgrad = 1.3; custom = on
    size4: Size on boundaries 10, 11, 13-16, 20, 21, 31, 32
      hmax = lmin*0.2
      hmin = 1E-9
      hcurve = 0.2
      hgrad = 1.3
      custom = on
    size5: Size on boundaries 12 | hmax = lmin*0.2; hmin = 4E-9; hcurve = 0.2; hnarrow = 5; hgrad = 1.3; custom = on
    size6: Size on boundaries 24, 25 | hmax = lmin*0.2; hmin = 5E-9; hcurve = 0.2; hnarrow = 5; hgrad = 1.3; custom = on
    id1: IdenticalMesh | group1 = boundaries 1, 4, 7, 10, 13; group2 = boundaries 28-32
    id2: IdenticalMesh | group1 = boundaries 2, 5, 8, 11, 14; group2 = boundaries 17-21
    dis1: Distribution on edges 1, 13, 18, 26, 41, 49, 52, 56 | type = predefined; elemcount = 8
    ftet1: FreeTet "Free Tetrahedral 1" on domains 2-4, 6 | optcurved = on
    map1: Map "Mapped 1" on boundaries 1, 13 | adjustedgdistr = on
    copy1: Copy | mesh = mesh9; source = boundaries 1, 13; destination = boundaries 28, 32
    map2: Map "Mapped 2" on boundaries 2, 14 | adjustedgdistr = on
    copy2: Copy | mesh = mesh9; source = boundaries 2, 14; destination = boundaries 17, 21
    swe1: Sweep "Swept 1" on domains 1, 5
      dis1: Distribution on domains 1, 5 | numelem = 8
  mesh10 "Mesh 1" [geom7] (physics-controlled)
  mesh11 "Manual Mesh" [geom7]
    size: MeshSizeDefault | hmax = lmin*0.2; hmin = 5E-9; hcurve = 0.2; hgrad = 1.3; custom = on
    size1: Size on domains 3 | hmax = lmin*0.2; hmin = 20E-9; hcurve = 0.2; hgrad = 1.3; custom = on
    size2: Size on domains 1, 2 | hmax = lmin*0.2; hmin = 20E-9; hcurve = 0.2; hgrad = 1.3; custom = on
    size3: Size on no domains | hmax = lmin*0.2; hmin = 20E-9; hcurve = 0.2; hgrad = 1.3; custom = on
    size4: Size on boundaries 10, 11, 13-16, 20, 21, 25, 26
      hmax = lmin*0.2
      hmin = 1E-9
      hcurve = 0.2
      hgrad = 1.3
      custom = on
    size5: Size on boundaries 12 | hmax = lmin*0.2; hmin = 4E-9; hcurve = 0.2; hnarrow = 5; hgrad = 1.3; custom = on
    size6: Size on no boundaries | hmax = lmin*0.2; hmin = 5E-9; hcurve = 0.2; hnarrow = 5; hgrad = 1.3; custom = on
    id1: IdenticalMesh | group1 = boundaries 1, 4, 7, 10, 13; group2 = boundaries 22-26
    id2: IdenticalMesh | group1 = boundaries 2, 5, 8, 11, 14; group2 = boundaries 17-21
    dis1: Distribution on edges 1, 13, 18, 26, 29, 37, 40, 44 | type = predefined; elemcount = 8
    ftet1: FreeTet "Free Tetrahedral 1" on domains 2-4 | optcurved = on
    map1: Map "Mapped 1" on boundaries 1, 13 | adjustedgdistr = on
    copy1: Copy | mesh = mesh11; source = boundaries 1, 13; destination = boundaries 22, 26
    map2: Map "Mapped 2" on boundaries 2, 14 | adjustedgdistr = on
    copy2: Copy | mesh = mesh11; source = boundaries 2, 14; destination = boundaries 17, 21
    swe1: Sweep "Swept 1" on domains 1, 5
      dis1: Distribution on domains 1, 5 | numelem = 8

Studies
  std1 "Study 1"
    param: Parametric "Parametric Sweep" | pname = lam; plistarr = range(lmin,lstep,lmax); punit = m
    freq: Frequency "Frequency Domain"
      punit = THz
      plist = c_const/lam
      ftplistmethod = manual
      mesh = {geom1, mesh5, geom6, mesh9, geom7, mesh11}

Solver configurations
  sol1 "Solution 1" (study std1)
    v1: Variables "Dependent Variables 1"
    s1: Stationary "Stationary Solver 1"
      p1: Parametric
      se1: Segregated
        ss1: SegregatedStep "Electromagnetic Waves, Frequency Domain"
        ss2: SegregatedStep "Electromagnetic Waves, Frequency Domain (2)"
        ss3: SegregatedStep "Electromagnetic Waves, Frequency Domain (3)"
        ss4: SegregatedStep "Electromagnetic Waves, Frequency Domain (4)"
      d1: Direct "Suggested Direct Solver (ewfd)"
      d2: Direct "Suggested Direct Solver (ewfd2)"
      d3: Direct "Suggested Direct Solver (ewfd3)"
      d4: Direct "Suggested Direct Solver (ewfd4)"
  sol2 "Parametric Solutions 1" (study std1)

Datasets
  dset1: Solution | solution = sol1
  dset2: Solution | solution = sol2
  dset11: Solution | solution = sol1
  dset12: Solution | solution = sol2
  dset13: Solution | solution = sol1
  dset14: Solution | solution = sol2
  cpl1: CutPlane
    data = dset12
    quickx = a/2
    genmethod = pointnormal
    genpoints = {{3.18E-7, 3.18E-7, 3.955E-6}, {0.769776, -0.638318, 3.955E-6}, {0.224825, 0.271128, 0.935923}}
  cpl2: CutPlane
    data = dset2
    quickx = a/2
    genmethod = pointnormal
    genpoints = {{3.18E-7, 3.18E-7, 3.955E-6}, {0.769776, -0.638318, 3.955E-6}, {0.224825, 0.271128, 0.935923}}
  cln1: CutLine2D | data = cpl1; genpoints = {{2.20002E-7, 6.0E-7}, {2.20002E-7, 8.0E-7}}

Derived values
  gev1: EvalGlobal "Global Evaluation 1" | data = dset1

Evaluation groups
  eg1: EvaluationGroup "Reflectance, Transmittance, and Absorptance (ewfd)" | data = dset1
    gev1: EvalGlobal "Reflectance, Transmittance, and Absorptance (ewfd)"
      table = new
      expr = {ewfd.Rorder_0_0, ewfd.Rtotal, ewfd.Torder_0_0, ewfd.Ttotal, ewfd.RTtotal, ewfd.Atotal}
  eg6: EvaluationGroup "Evaluation Group nonlinear transmission" | data = dset2
    gev1: EvalGlobal "Global Evaluation NL transmission"
      expr = {abs(comp1.ewfd.S12)^2/abs(comp3.ewfd3.S12)^2, abs(comp1.ewfd.S12)^2}
      unit = {1, 1}
      descr = {Nonlinear transmission ref to ITO coated substrate, Nonlinear transmission no reference}
  eg7: EvaluationGroup "Evaluation Group linear transmission" | data = dset12
    gev1: EvalGlobal "Global Evaluation Linear transmission"
      expr = {abs(comp2.ewfd2.S12)^2/abs(comp3.ewfd3.S12)^2, abs(comp2.ewfd2.S12)^2}
      descr = {Linear transmission ref to ITO coated substrate, Linear transmission no reference}
  eg8: EvaluationGroup "Evaluation Group phase difference" | data = dset14
    gev1: EvalGlobal "Global Evaluation phase difference"
      expr = arg(comp2.ewfd2.S12/comp1.ewfd.S12)
      unit = rad
      descr = Phase difference

Plots
  pg1: PlotGroup3D "Electric Field (ewfd)" | data = dset1; applyselectiontodatasetedges = on
    mslc1: Multislice | expr = ewfd.normE
  pg3: PlotGroup1D "Transmission linear" | data = dset1; xlabel = Wavelength (µm); ylabel = Transmittance, linear
    glob1: Global "transmittance linear"
      data = dset2
      expr = abs(comp2.ewfd2.S12)^2/abs(comp3.ewfd3.S12)^2
      xdata = expr
      xdataexpr = c_const/freq
    glob2: Global "transmittance linear no reference" (disabled)
      data = dset2
      expr = abs(comp2.ewfd2.S12)^2
      xdata = expr
      xdataexpr = c_const/freq
      legends = Transmittance without reference
    glob3: Global "transmittance reference" (disabled)
      data = dset12
      expr = abs(comp3.ewfd3.S12)^2
      xdata = expr
      xdataexpr = c_const/freq
      legends = Transmittance reference
  pg16: PlotGroup1D "Transmission nonlinear" | data = dset1; xlabel = Wavelength (µm); ylabel = Transmittance, nonlinear
    glob1: Global "transmittance nonlinear"
      data = dset14
      expr = abs(comp1.ewfd.S12)^2/abs(comp3.ewfd3.S12)^2
      xdata = expr
      xdataexpr = c_const/freq
      legends = Transmittance referenced
    glob2: Global "transmittance nonlinear no reference" (disabled)
      data = dset14
      expr = abs(comp1.ewfd.S12)^2
      xdata = expr
      xdataexpr = c_const/freq
      legends = Transmittance without reference
  pg17: PlotGroup1D "Phase difference"
    data = dset1
    xlabel = Wavelength (µm)
    ylabel = Phase difference (rad)
    manualgrid = on
    yspacing = pi/4
    glob1: Global "phase difference"
      data = dset2
      expr = arg(comp2.ewfd2.S12/comp1.ewfd.S12)
      unit = rad
      unwrapphase = on
      xdata = expr
      xdataexpr = c_const/freq
      legends = Phase difference
    glob2: Global "phase linear" (disabled)
      data = dset2
      expr = arg(comp2.ewfd2.S12)
      unit = rad
      unwrapphase = on
      xdata = expr
      xdataexpr = c_const/freq
      legends = Phase linear
    glob3: Global "phase nonlinear" (disabled)
      data = dset14
      expr = arg(comp1.ewfd.S12)
      unwrapphase = on
      xdata = expr
      xdataexpr = c_const/freq
      legends = Phase nonlinear
  pg6: PlotGroup2D "E-field lin forward" | data = cpl1; axisnotation = scientific
    surf1: Surface
      data = cpl1
      cutplane = cpl1
      planefirst = {-2.044759758e-06, -2.53136887593e-06, 5.34801419558e-06}
      planesecond = {2.68075973957e-06, 3.1673688575e-06, 2.56198582651e-06}
      planeisinit = on
      expr = comp2.ewfd2.normE
  pg18: PlotGroup2D "E-field nonlin forward" | data = cpl2; axisnotation = scientific; axisprecision = 4
    surf1: Surface
      data = cpl2
      cutplane = cpl1
      planefirst = {-2.044759758e-06, -2.53136887593e-06, 5.34801419558e-06}
      planesecond = {2.68075973957e-06, 3.1673688575e-06, 2.56198582651e-06}
      planeisinit = on
      expr = comp1.ewfd.normE
      unit = V/m

Exports
  plot1: Plot